*Material, name=abaqus1
*USER MATERIAL, CONSTANTS=1
0,
*Material, name=abaqus2
*USER MATERIAL, CONSTANTS=1
0,
*Node
      1,          63.,          76.
      2,          68.,          76.
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*Element, type=CPE3
 1, 1478,  207,  206
 2, 1480,  206, 1479
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*Elset, elset=matrix, generate
 2309,  5103,     1
*Elset, elset=fiber
    1,    2,    3,    4,    5,    6
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*Nset, nset=fibercentroid
   1,   3,   5,   7,   9,  11
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*Nset, nset=botedge
   67,   70,   71,   72,   73,   76
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*Nset, nset=leftcornernodes
 177,169
*Nset, nset=topedge
   29,   30,   31,   34,   37,   38
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*Nset, nset=rightedge
   23,   24,   25,   26,   27,   61
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*Solid Section, elset=fiber, material=abaqus1
,
*Solid Section, elset=matrix, material=abaqus2
,
*Step
*Static
1., 1., 1e-05, 1.
*Boundary
botedge, 2, 2
leftcornernodes, 1, 1
topedge, 2, 2, -1
*NODE PRINT,NSET=fibercentroid
U
*NODE PRINT,NSET=botedge
RF
*NODE FILE
U
*END STEP
